15/11/2021
11:57
;; 1. Based on: run003e
;; 2. Description: uncrtnty package
;; x1. Author: le_louedec
$PROB uncrtnty package
$INPUT ID TIME EVID CMT AMT DV MDV
$DATA data003.csv IGNORE=@
$SUB ADVAN1 TRANS1
$PK
K = 0.1; * EXP(ETA(1))
V = 1
S1 = 1
$ERROR
Y = F; + EPS(1)

$OMEGA 1 2 3 4
$SIM (123) ONLYSIM

NM-TRAN MESSAGES
 WARNINGS AND ERRORS (IF ANY) FOR PROBLEM    1
 (WARNING  1) NM-TRAN INFERS THAT THE DATA ARE SINGLE-SUBJECT.
  NONMEM RUN CANNOT BE PARALLELIZED.
 (WARNING  86) WHEN ONLYSIM IS NOT USED, AN ETA VARIABLE MAY BE REQUIRED.
 (WARNING  30) $OMEGA INCLUDES A NON-FIXED INITIAL ESTIMATE CORRESPONDING TO
 AN ETA (OR ERR) THAT IS NOT USED IN ABBREVIATED CODE.

1NONLINEAR MIXED EFFECTS MODEL PROGRAM (NONMEM) VERSION 7.4.4
 ORIGINALLY DEVELOPED BY STUART BEAL, LEWIS SHEINER, AND ALISON BOECKMANN
 CURRENT DEVELOPERS ARE ROBERT BAUER, ICON DEVELOPMENT SOLUTIONS,
 AND ALISON BOECKMANN. IMPLEMENTATION, EFFICIENCY, AND STANDARDIZATION
 PERFORMED BY NOUS INFOSYSTEMS.
 PROBLEM NO.:         1
 uncrtnty package
 TOT. NO. OF OBS RECS:        0
 TOT. NO. OF INDIVIDUALS:        1
 ONE COMPARTMENT MODEL (ADVAN1)
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 SIMULATION STEP PERFORMED
 Elapsed simulation  time in seconds:     0.07
 Elapsed finaloutput time in seconds:     0.00
 #CPUT: Total CPU Time in Seconds,        0.063
